ORIGIN := 1
Xw := [0, 50]
Yw := [0, 30]
m := 5  # -число подобластей
X :=
    for i ∈ 1 .. cols(Xw)
        for j ∈ 1 .. cols(Xw)*cols(Yw)
            k ← trunc((j - 1)/cols(Yw)) + 1
            X[j] ← transpose(Xw)[k]
        V ← stack(V, transpose(Yw))
    for i ∈ 2 .. cols(Xw)*cols(Yw) + 1
        J[i - 1] ← V[i]
    augment(X, J)
SOD :=
    for i ∈ 1 .. 5
        for j ∈ 1 .. m
            S[i, 1] ← i
            S[i, 2] ← i
            S[i, 3] ← S[i, 2] + 4
            S[i, 4] ← S[i, 3] + 1
            S[i, 5] ← S[i, 4] - 4
    S
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X = [0, 0; 0, 30; 50, 0; 50, 30]
SOD = [1, 1, 5, 6, 2; 2, 2, 6, 7, 3; 3, 3, 7, 8, 4; 4, 4, 8, 9, 5; 5, 5, 9, 10, 6]
SOD := [1, 1, 5, 6, 2; 2, 2, 6, 7, 3; 3, 3, 7, 8, 4; 4, 5, 9, 10, 6; 5, 7, 11, 12, 8]
FX :=
    for i ∈ 1 .. m
        for j ∈ 1 .. 4
            FXS[i, j] ← X[:, 1][SOD[i, j + 1]]
            FXS[i, 5] ← FXS[i, 1]
            FXS[i, 6] ← sqrt(-1)
    FXS  # error: This array index is invalid for this array.
FY :=
    for i ∈ 1 .. m
        for j ∈ 1 .. 4
            FYS[i, j] ← X[:, 2][SOD[i, j + 1]]
            FYS[i, 5] ← FYS[i, 1]
            FYS[i, 6] ← sqrt(-1)
    FYS  # error: This array index is invalid for this array.
X = [0, 0; 0, 30; 50, 0; 50, 30]
Prog(M) :=
    k ← 1
    for i ∈ 1 .. rows(M)
        for j ∈ 1 .. cols(M)
            V[k] ← M[i, j]
            k ← k + 1
    V
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nodes := READPRN("nodes.txt")
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elements := READPRN("elements.txt")
m := rows(elements) = 32  # - число элементов
n := rows(nodes) = 48
ORIGIN := 1
FX :=
    for i ∈ 1 .. m
        for j ∈ 1 .. 4
            FX[i, j] ← nodes[:, 2][elements[i, j + 1]]
            FX[i, 4] ← FX[i, 1]
            FX[i, 5] ← FX[i, 1]
            FX[i, 6] ← sqrt(-1)
    FX
FY :=
    for i ∈ 1 .. m
        for j ∈ 1 .. 4
            FY[i, j] ← nodes[:, 3][elements[i, j + 1]]
            FY[i, 4] ← FY[i, 3] if j == 3
            FY[i, 5] ← FY[i, 1]
            FY[i, 6] ← sqrt(-1)
    FY
nodes = [
    1, 0, 0;
    2, 65, 0;
    3, 130, 0;
    4, 150, 0;
    5, 170, 0;
    6, 235, 0;
    7, 300, 0;
    8, 0, 15;
    9, 65, 15;
    10, 130, 15
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]
elements = [
    1, 1, 2, 9, 8;
    2, 2, 3, 10, 9;
    3, 3, 4, 11, 10;
    4, 4, 5, 12, 11;
    5, 5, 6, 13, 12;
    6, 6, 7, 14, 13;
    7, 8, 9, 16, 15;
    8, 9, 10, 17, 16;
    9, 10, 11, 18, 17;
    10, 11, 12, 19, 18
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]
Prog(M) :=
    k ← 1
    for i ∈ 1 .. rows(M)
        for j ∈ 1 .. cols(M)
            G[k] ← M[i, j]
            k ← k + 1
    G
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nodes1 := READPRN("nodes.txt")
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nodes1 = [
    1, 0, 0;
    2, 65, 0;
    3, 130, 0;
    4, 150, 0;
    5, 170, 0;
    6, 235, 0;
    7, 300, 0;
    8, 0, 15;
    9, 65, 15;
    10, 130, 15
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]
elements1 := READPRN("elements.txt")
m1 := rows(elements1) = 32  # - число элементов после удаления подобласти
rows(nodes1) = 48  # - число узлов после удаления подобласти
ORIGIN := 1
FX :=
    for i ∈ 1 .. m1
        for j ∈ 1 .. 4
            FX[i, j] ← nodes1[:, 2][elements1[i, j + 1]]
            FX[i, 4] ← FX[i, 1]
            FX[i, 5] ← FX[i, 1]
            FX[i, 6] ← sqrt(-1)
    FX
FY :=
    for i ∈ 1 .. m1
        for j ∈ 1 .. 4
            FY[i, j] ← nodes1[:, 3][elements1[i, j + 1]]
            FY[i, 4] ← FY[i, 3] if j == 3
            FY[i, 5] ← FY[i, 1]
            FY[i, 6] ← sqrt(-1)
    FY
nodes1 = [
    1, 0, 0;
    2, 65, 0;
    3, 130, 0;
    4, 150, 0;
    5, 170, 0;
    6, 235, 0;
    7, 300, 0;
    8, 0, 15;
    9, 65, 15;
    10, 130, 15
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]
elements1 = [
    1, 1, 2, 9, 8;
    2, 2, 3, 10, 9;
    3, 3, 4, 11, 10;
    4, 4, 5, 12, 11;
    5, 5, 6, 13, 12;
    6, 6, 7, 14, 13;
    7, 8, 9, 16, 15;
    8, 9, 10, 17, 16;
    9, 10, 11, 18, 17;
    10, 11, 12, 19, 18
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]
Prog(M) :=
    k ← 1
    for i ∈ 1 .. rows(M)
        for j ∈ 1 .. cols(M)
            G[k] ← M[i, j]
            k ← k + 1
    G
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FX = [
    0, 65, 65, 0, 0, 1i;
    65, 130, 130, 65, 65, 1i;
    130, 150, 150, 130, 130, 1i;
    150, 170, 170, 150, 150, 1i;
    170, 235, 235, 170, 170, 1i;
    235, 300, 300, 235, 235, 1i;
    0, 65, 65, 0, 0, 1i;
    65, 130, 130, 65, 65, 1i;
    130, 150, 150, 130, 130, 1i;
    150, 170, 170, 150, 150, 1i
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]
FY = [
    0, 0, 15, 15, 0, 1i;
    0, 0, 15, 15, 0, 1i;
    0, 0, 15, 15, 0, 1i;
    0, 0, 15, 15, 0, 1i;
    0, 0, 15, 15, 0, 1i;
    0, 0, 15, 15, 0, 1i;
    15, 15, 30, 30, 15, 1i;
    15, 15, 30, 30, 15, 1i;
    15, 15, 30, 30, 15, 1i;
    15, 15, 30, 30, 15, 1i
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]
global_stiffness_matrix := READPRN("out_stiffness_matrix.txt")
global_load_vector := READPRN("out_loads_vec.txt")
GSM := global_stiffness_matrix
GLV := global_load_vector
# сумма элементов строки или столбца матрицы должна быть равна нулю
sum :=
    for i ∈ 1 .. rows(GSM)
        sum[i] ← sum(GSM[i, j], j = 1 .. cols(GSM))
    sum
GLV =  # no stored result
sum =  # no stored result
sum(GLV[i], i = 1 .. rows(GLV)) = -30000  # Н
u := READPRN("u.txt")  # вектор перемещений, полученный с помощью PARDISO
# Аналитика:
a := transpose(Xw)[cols(Xw)] - transpose(Xw)[1] = 50  # мм
b := transpose(Yw)[cols(Yw)] - transpose(Yw)[1] = 30  # мм
q := 1000  # Н/мм
t := 3  # мм
E := 2.1*10^5  # МПа
σ := q*b/(t*b) = 333.333  # МПа
|GSM| = Infinity
disp := GSM^-1*GLV
scale := 100
u_an := a*σ/E = 0.0793651
NEW_COORDS :=
    n ← rows(nodes)
    for i ∈ 1 .. n
        res[i, 2] ← nodes[i, 2] + scale*u[2*i - 1]
        res[i, 3] ← nodes[i, 3] + scale*u[2*i - 0]
        res[i, 1] ← i
    res
NEW_COORDS = [
    1, -7.87069, 0.714392;
    2, 57.923, 0.715182;
    3, 123.717, 0.716415;
    4, 144.509, 0.718483;
    5, 165.3, 0.72133;
    6, 231.086, 0.723603;
    7, 296.862, 0.720685;
    8, -2.37755, 15.7009;
    9, 63.3661, 15.6383;
    10, 129.079, 15.481
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]
disp =  # no stored result
u =  # no stored result
FXn :=
    for i ∈ 1 .. m1
        for j ∈ 1 .. 4
            FX[i, j] ← NEW_COORDS[:, 2][elements[i, j + 1]]
            FX[i, 4] ← FX[i, 1]
            FX[i, 5] ← FX[i, 1]
            FX[i, 6] ← sqrt(-1)
    FX
FYn :=
    for i ∈ 1 .. m1
        for j ∈ 1 .. 4
            FY[i, j] ← NEW_COORDS[:, 3][elements1[i, j + 1]]
            FY[i, 4] ← FY[i, 3] if j == 3
            FY[i, 5] ← FY[i, 1]
            FY[i, 6] ← sqrt(-1)
    FY
Prog(M) :=
    k ← 1
    for i ∈ 1 .. rows(M)
        for j ∈ 1 .. cols(M)
            G[k] ← M[i, j]
            k ← k + 1
    G
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nodes = [
    1, 0, 0;
    2, 65, 0;
    3, 130, 0;
    4, 150, 0;
    5, 170, 0;
    6, 235, 0;
    7, 300, 0;
    8, 0, 15;
    9, 65, 15;
    10, 130, 15
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]
NEW_COORDS = [
    1, -7.87069, 0.714392;
    2, 57.923, 0.715182;
    3, 123.717, 0.716415;
    4, 144.509, 0.718483;
    5, 165.3, 0.72133;
    6, 231.086, 0.723603;
    7, 296.862, 0.720685;
    8, -2.37755, 15.7009;
    9, 63.3661, 15.6383;
    10, 129.079, 15.481
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]
FX = [
    0, 65, 65, 0, 0, 1i;
    65, 130, 130, 65, 65, 1i;
    130, 150, 150, 130, 130, 1i;
    150, 170, 170, 150, 150, 1i;
    170, 235, 235, 170, 170, 1i;
    235, 300, 300, 235, 235, 1i;
    0, 65, 65, 0, 0, 1i;
    65, 130, 130, 65, 65, 1i;
    130, 150, 150, 130, 130, 1i;
    150, 170, 170, 150, 150, 1i
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]
FXn = [
    -7.87069, 57.923, 63.3661, -7.87069, -7.87069, 1i;
    57.923, 123.717, 129.079, 57.923, 57.923, 1i;
    123.717, 144.509, 150, 123.717, 123.717, 1i;
    144.509, 165.3, 162.129, 144.509, 144.509, 1i;
    165.3, 231.086, 227.923, 165.3, 165.3, 1i;
    231.086, 296.862, 293.716, 231.086, 231.086, 1i;
    -2.37755, 63.3661, 60.2998, -2.37755, -2.37755, 1i;
    63.3661, 129.079, 126.086, 63.3661, 63.3661, 1i;
    129.079, 150, 146.863, 129.079, 129.079, 1i;
    150, 162.129, 167.628, 150, 150, 1i
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]
FY = [
    0, 0, 15, 15, 0, 1i;
    0, 0, 15, 15, 0, 1i;
    0, 0, 15, 15, 0, 1i;
    0, 0, 15, 15, 0, 1i;
    0, 0, 15, 15, 0, 1i;
    0, 0, 15, 15, 0, 1i;
    15, 15, 30, 30, 15, 1i;
    15, 15, 30, 30, 15, 1i;
    15, 15, 30, 30, 15, 1i;
    15, 15, 30, 30, 15, 1i
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]
FYn = [
    0.714392, 0.715182, 15.6383, 15.7009, 0.714392, 1i;
    0.715182, 0.716415, 15.481, 15.6383, 0.715182, 1i;
    0.716415, 0.718483, 15, 15.481, 0.716415, 1i;
    0.718483, 0.72133, 15.6858, 15, 0.718483, 1i;
    0.72133, 0.723603, 15.6866, 15.6858, 0.72133, 1i;
    0.723603, 0.720685, 15.6879, 15.6866, 0.723603, 1i;
    15.7009, 15.6383, 30.6929, 30.69, 15.7009, 1i;
    15.6383, 15.481, 30.6954, 30.6929, 15.6383, 1i;
    15.481, 15, 30.6931, 30.6954, 15.481, 1i;
    15, 15.6858, 30.6732, 30.6931, 15, 1i
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]
(|u[1]| - |u[3]|)/|u[1]|*100 = 10.0841
